OpenVSP model (file version 5), 10 components.
Geometry view with OpenVSP parameter names; values to 6 digits, angles in degrees, lengths in the model's unit.
Overall bounding box: X_Min=0 X_Len=50 Y_Min=-32 Y_Len=64 Z_Min=-28 Z_Len=64

Blank "Measurement_Devices"
  location (X Y Z) 0 0 0, rotation 0 0 0

Custom "3D MachCone", child of "Measurement_Devices"
  location (X Y Z) 40 0 4, rotation -180 0 -180; relative location 40 0 4, rotation 0 180 0
  bounding box size 40 64 64
  Design: Diameter=64 Height=40
  custom script Cone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

Custom "RFP_Dimension_Limits", child of "Measurement_Devices"
  location (X Y Z) 0 0 5, rotation 0 0 0
  bounding box size 50 60 18.5
  Design: Height=18.5 Length=50 SquareFlag=0 Width=60
  custom script Box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

Blank "FullVehicle"
  location (X Y Z) 0 0 0, rotation 0 0 0

Blank "General_Body", child of "FullVehicle"
  location (X Y Z) 0 0 0, rotation 0 0 0

Fuselage "PrimaryFuselage", child of "General_Body"
  location (X Y Z) 0 0 4.7, rotation 0 0 0
  bounding box size 50 7.5 5.66232
  Design: Length=50
  cross sections:
    n  XLocPercent  YLocPercent  ZLocPercent  shape
    0  0            0            0            point
    1  0.2          0            0            edit curve Width=5 Height=6 AbsoluteFlag=1 SymType=1 linear points (X Y): 0.378271 0.22555, 0.5 0.1125, 0.32 -0.108333, 0.17 -0.208333, 0 -0.25, -0.17 -0.208333, -0.32 -0.108333, -0.5 0.1125, -0.378271 0.22555, -0.273921 0.350553, -0.189136 0.508166, -0.117395 0.654909, 0 0.698389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
    2  0.47         0            0            edit curve Width=7.5 Height=5 AbsoluteFlag=1 SymType=1 linear points (X Y): 0.433333 0.35, 0.466667 0.2, 0.266667 -0.3, 0.15 -0.3, 0 -0.3, -0.15 -0.3, -0.266667 -0.3, -0.466667 0.2, -0.433333 0.35, -0.333333 0.44, -0.233333 0.52, -0.1 0.58, 0 0.58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
    3  0.75         0            -0.00638298  edit curve Width=7.5 Height=4 AbsoluteFlag=1 SymType=1 linear points (X Y): 0.45 0.35, 0.5 0.2, 0.3 -0.3, 0.15 -0.3, 0 -0.3, -0.15 -0.3, -0.3 -0.3, -0.5 0.2, -0.45 0.35, -0.35 0.44, -0.24 0.52, -0.125 0.58, 0 0.6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
    4  1            0            0.0146809    edit curve Width=7.5 Height=0 AbsoluteFlag=1 SymType=1 linear points (X Y): 0.45 0.35, 0.5 0.2, 0.3 -0.3, 0.15 -0.3, 0 -0.3, -0.15 -0.3, -0.3 -0.3, -0.5 0.2, -0.45 0.35, -0.35 0.44, -0.24 0.52, -0.125 0.58, 0 0.6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

Blank "PropulsionObjects", child of "General_Body"
  location (X Y Z) 0 0.8 0, rotation 0 0 0

Blank "FlyingSurfaces", child of "FullVehicle"
  location (X Y Z) 0 0 0, rotation 0 0 0

Wing "MainWing", child of "FlyingSurfaces"
  location (X Y Z) 21 0 5.7, rotation 0 0 0
  symmetric about XZ
  bounding box size 28.6002 47.8274 1.72599
  totals: TotalSpan=47.6731 TotalProjectedSpan=47.6731 TotalChord=15.7321 TotalArea=750 TotalAR=3.0303
  root: chord 28.6039, twist 0, NACA 64-series A=1 IdealCl=0.2 Theta=-1 ThickChord=0.06
  sections:
    n  Span     Root_Chord  Tip_Chord  Area  Sweep  Sweep_Location  Dihedral  Twist  Twist_Location  tip airfoil
    1  23.8366  28.6039     2.86039    375   40     0               0         0      0.25            NACA 64-series A=1 IdealCl=0.2 ThickChord=0.06
  SS_Control "ELEVONS": UStart=0.495 UEnd=0.345 Length_C_Start=0.25 Length_C_End=0.25 Length_Start=0.779446 Length_End=2.71016 LE_Flag=0 Surf_Type=2
  SS_Control "SS_CONT_2": UStart=0.335 UEnd=0.12 Length_C_Start=0.25 Length_C_End=0.25 Length_Start=2.83887 Length_End=5.60633 LE_Flag=0 Surf_Type=2

Wing "Canards", child of "FlyingSurfaces"
  location (X Y Z) 10 2 5, rotation 10 0 0
  symmetric about XZ
  bounding box size 10.4946 21.7435 2.00522
  totals: TotalSpan=17.9908 TotalProjectedSpan=17.9908 TotalChord=4.49769 TotalArea=80.9169 TotalAR=4
  root: chord 7.49615, twist 0, NACA 4-series Camber=0 CamberLoc=0.2 ThickChord=0.1
  sections:
    n  Span     Root_Chord  Tip_Chord  Area     Sweep  Sweep_Location  Dihedral  Twist  Twist_Location  tip airfoil
    1  8.99538  7.49615     1.49923    40.4585  45     0               0         0      0.25            as above
