OpenVSP model (file version 5), 10 components.
Geometry view with OpenVSP parameter names; values to 6 digits, angles in degrees, lengths in the model's unit.
Overall bounding box: X_Min=-0.196136 X_Len=50.4461 Y_Min=-32 Y_Len=64 Z_Min=-28 Z_Len=64

Blank "Measurement_Devices"
  location (X Y Z) 0 0 0, rotation 0 0 0

Custom "3D MachCone", child of "Measurement_Devices"
  location (X Y Z) 40 0 4, rotation -180 0 -180; relative location 40 0 4, rotation 0 180 0
  bounding box size 40 64 64
  Design: Diameter=64 Height=40
  custom script Cone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

Custom "RFP_Dimension_Limits", child of "Measurement_Devices"
  location (X Y Z) 0 0 5, rotation 0 0 0
  bounding box size 50 60 18.5
  Design: Height=18.5 Length=50 SquareFlag=0 Width=60
  custom script Box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

Blank "FullVehicle"
  location (X Y Z) 0 0 0, rotation 0 0 0

Blank "General_Body", child of "FullVehicle"
  location (X Y Z) 0 0 0, rotation 0 0 0

Stack "Ducts", child of "General_Body"
  location (X Y Z) 26 7.2 0, rotation 0 0 0
  symmetric about XZ
  bounding box size 18.9118 17.3076 3.55289
  cross sections:
    n  XDelta  YDelta  ZDelta  shape
    0  0       0       0       edit curve Width=3 Height=3 AbsoluteFlag=1 SymType=0 linear points (X Y): 0.233333 -0.5, -0.0333333 -1, -0.533333 -1, -1.03333 -1, -0.766667 -0.5, -0.5 0, 0 0, 0.5 0, 0.233333 -0.5
    1  8       0       0       as above
    2  11      -3      0       edit curve Width=1.7 Height=1.8 AbsoluteFlag=1 SymType=0 linear points (X Y): 0.233333 -0.5, -0.0333333 -1, -0.533333 -1, -1.03333 -1, -0.766667 -0.5, -0.5 0, 0 0, 0.5 0, 0.233333 -0.5

Fuselage "FuselageGeom", child of "General_Body"
  location (X Y Z) 0 0 0, rotation 0 0 0
  bounding box size 46.3961 11 6.40302
  Design: Length=46.2
  cross sections:
    n  XLocPercent  YLocPercent  ZLocPercent  shape
    0  0            0            -0.025974    edit curve Width=0 Height=0 AbsoluteFlag=0 SymType=0 cubic Bezier points (X Y): 0 0, 0 0, 0 0, 0 0, 0 0, 0 0, 0 0
    1  0.27         0            0            edit curve Width=6 Height=5 AbsoluteFlag=1 SymType=1 linear points (X Y): 0.5 0, 0.3 -0.6, 0 -0.6, -0.3 -0.6, -0.5 0, -0.312671 0.203425, -0.161986 0.528904, 0 1.16178, 0.161986 0.528904, 0.312671 0.203425, 0.5 0
    2  0.6          0            0            edit curve Width=11 Height=5 AbsoluteFlag=1 SymType=1 linear points (X Y): 0.5 0, 0.363636 -0.6, 0 -0.6, -0.363636 -0.6, -0.5 0, -0.363636 0.4, 0 0.5, 0.363636 0.4, 0.5 0
    3  0.75         0            0            as above
    4  1            0            0            rounded rectangle RoundRectXSec_Radius=0.2 RoundedRect_Height=4 RoundedRect_Width=10

Blank "FlyingSurfaces", child of "FullVehicle"
  location (X Y Z) 0 0 0, rotation 0 0 0

Wing "MainWing", child of "FlyingSurfaces"
  location (X Y Z) 21 0 0.5, rotation 0 0 0
  symmetric about XZ
  bounding box size 28.6002 47.8274 1.72599
  totals: TotalSpan=47.6731 TotalProjectedSpan=47.6731 TotalChord=15.7321 TotalArea=750 TotalAR=3.0303 MAC=19.2425
  root: chord 28.6039, twist 0, NACA 64-series A=1 IdealCl=0.2 Theta=-1 ThickChord=0.06
  sections:
    n  Span     Root_Chord  Tip_Chord  Area  Sweep  Sweep_Location  Dihedral  Twist  Twist_Location  tip airfoil
    1  23.8366  28.6039     2.86039    375   40     0               0         0      0.25            NACA 64-series A=1 IdealCl=0.2 ThickChord=0.06
  SS_Control "ELEVONS": UStart=0.495 UEnd=0.345 Length_C_Start=0.25 Length_C_End=0.25 Length_Start=0.779446 Length_End=2.71016 LE_Flag=0 Surf_Type=2
  SS_Control "SS_CONT_2": UStart=0.335 UEnd=0.12 Length_C_Start=0.25 Length_C_End=0.25 Length_Start=2.83887 Length_End=5.60633 LE_Flag=0 Surf_Type=2

Stack "F135PW100 TVC"
  location (X Y Z) 31.5 3 0, rotation 0 0 0
  symmetric about XZ
  bounding box size 18.75 10 4
  cross sections:
    n  XDelta  YDelta  ZDelta  shape
    0  0       0       0       ellipse Ellipse_Height=3.8 Ellipse_Width=3.8
    1  14.67   0       0       as above
    2  0       0       0       edit curve Width=4 Height=4 AbsoluteFlag=1 SymType=0 linear points (X Y): 0.5 0, 0.5 -0.45, 0 -0.5, -0.5 -0.45, -0.5 0, -0.5 0.45, 0 0.5, 0.5 0.45, 0.5 0
    3  4.08    0       0       edit curve Width=4 Height=1.5 AbsoluteFlag=0 SymType=0 linear points (X Y): 0.5 0, 0.5 -0.45, 0 -0.5, -0.5 -0.45, -0.5 0, -0.5 0.45, 0 0.5, 0.5 0.45, 0.5 0
