OpenVSP model (file version 5), 12 components.
Geometry view with OpenVSP parameter names; values to 6 digits, angles in degrees, lengths in the model's unit.
Overall bounding box: X_Min=0 X_Len=50 Y_Min=-32 Y_Len=64 Z_Min=-32 Z_Len=64

Blank "Measurement_Devices"
  location (X Y Z) 0 0 0, rotation 0 0 0

Custom "3D MachCone", child of "Measurement_Devices"
  location (X Y Z) 40 0 0, rotation -180 0 -180; relative location 40 0 0, rotation 0 180 0
  bounding box size 40 64 64
  Design: Diameter=64 Height=40
  custom script Cone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

Custom "RFP_Dimension_Limits", child of "Measurement_Devices"
  location (X Y Z) 0 0 5, rotation 0 0 0
  bounding box size 50 60 18.5
  Design: Height=18.5 Length=50 SquareFlag=0 Width=60
  custom script Box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

Blank "FullVehicle"
  location (X Y Z) 0 0 0, rotation 0 0 0

Blank "General_Body", child of "FullVehicle"
  location (X Y Z) 0 0 0, rotation 0 0 0

Stack "Ducts", child of "General_Body"
  location (X Y Z) 12.6 4.5 0, rotation 0 0 0
  symmetric about XZ
  bounding box size 34.902 12 2
  cross sections:
    n  XDelta  YDelta  ZDelta  shape
    0  0       0       0       edit curve Width=3 Height=2 AbsoluteFlag=1 SymType=0 linear points (X Y): 0.233333 -0.5, -0.0333333 -1, -0.533333 -1, -1.03333 -1, -0.766667 -0.5, -0.5 0, 0 0, 0.5 0, 0.233333 -0.5
    1  8       0       0       as above
    2  17      0       0       as above
    3  10      0       0       edit curve Width=3 Height=0 AbsoluteFlag=1 SymType=0 linear points (X Y): 0.233333 -0.5, -0.0333333 -1, -0.533333 -1, -1.03333 -1, -0.766667 -0.5, -0.5 0, 0 0, 0.5 0, 0.233333 -0.5

Fuselage "FuselageGeom", child of "General_Body"
  location (X Y Z) 0 0 0, rotation 0 0 0
  bounding box size 45.9 12 6
  Design: Length=45.9
  cross sections:
    n  XLocPercent  YLocPercent  ZLocPercent  shape
    0  0            0            0            edit curve Width=0 Height=0 AbsoluteFlag=0 SymType=0 cubic Bezier points (X Y): 0 0, 0 0, 0 0, 0 0, 0 0, 0 0, 0 0
    1  0.04329      0            0            edit curve Width=3 Height=2 AbsoluteFlag=1 SymType=1 cubic Bezier points (X Y): 0.5 0, 0.25 -0.5, 0.25 -0.5, 0 -0.5, -0.25 -0.5, -0.25 -0.5, -0.5 0, -0.25 0.5, -0.25 0.5, 0 0.5, 0.25 0.5, 0.25 0.5, 0.5 0
    2  0.12987      0            0            edit curve Width=4 Height=4 AbsoluteFlag=1 SymType=1 cubic Bezier points (X Y): 0.5 0, 0.25 -0.5, 0.25 -0.5, 0 -0.5, -0.25 -0.5, -0.25 -0.5, -0.5 0, -0.25 0.5, -0.25 0.5, 0 0.5, 0.25 0.5, 0.25 0.5, 0.5 0
    3  0.25974      0            0            edit curve Width=5.5 Height=6 AbsoluteFlag=1 SymType=1 cubic Bezier points (X Y): 0.5 0.0833333, 0.25 -0.333333, 0.25 -0.333333, 0 -0.333333, -0.25 -0.333333, -0.25 -0.333333, -0.5 0.0833333, -0.1 0.25, -0.166667 0.666667, 0 0.666667, 0.166667 0.666667, 0.1 0.25, 0.5 0.0833333
    4  0.4          0            0            edit curve Width=7 Height=4.5 AbsoluteFlag=1 SymType=1 cubic Bezier points (X Y): 0.5 0.1, 0.25 -0.444444, 0.25 -0.444444, 0 -0.444444, -0.25 -0.444444, -0.25 -0.444444, -0.5 0.1, -0.171429 0.555556, -0.171429 0.555556, 0 0.555556, 0.171429 0.555556, 0.171429 0.555556, 0.5 0.1
    5  0.522876     0            0            as above
    6  0.697168     0            0            edit curve Width=12 Height=4 AbsoluteFlag=1 SymType=1 cubic Bezier points (X Y): 0.5 0.1125, 0.375 0.1125, 0.375 0.1125, 0.375 -0.275, 0.254167 -0.5, 0.254167 -0.5, 0.208333 -0.5, 0.1625 -0.5, 0.1625 -0.5, 0.0416667 -0.275, 0.025 -0.25, 0.0166667 -0.25, 0 -0.25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
    7  1            0            0            as above
  SS_Ellipse "SS_ELLIP_0": Center_U=0.35 Center_W=0.75 U_Length=0.18 W_Length=0.35

Blank "FlyingSurfaces", child of "FullVehicle"
  location (X Y Z) 0 0 0, rotation 0 0 0

Wing "MainWing", child of "FlyingSurfaces"
  location (X Y Z) 21 0 0.5, rotation 0 0 0
  symmetric about XZ
  bounding box size 28.6002 50.1534 1.72599
  totals: TotalSpan=50 TotalProjectedSpan=50 TotalChord=15.7321 TotalArea=786.607 TotalAR=3.17821 MAC=19.2425
  root: chord 28.6039, twist 0, NACA 64-series A=1 IdealCl=0.2 Theta=-1 ThickChord=0.06
  sections:
    n  Span  Root_Chord  Tip_Chord  Area     Sweep  Sweep_Location  Dihedral  Twist  Twist_Location  tip airfoil
    1  25    28.6039     2.86039    393.303  40     0               0         0      0.25            NACA 64-series A=1 IdealCl=0.2 ThickChord=0.06
  SS_Control "Elevons": UStart=0.495 UEnd=0.345 Length_C_Start=0.384889 Length_C_End=0.110695 Length_Start=1.2 Length_End=1.2 LE_Flag=0 Surf_Type=2
  SS_Control "OutboardFlap": UStart=0.335 UEnd=0.23 Length_C_Start=0.308221 Length_C_End=0.20881 Length_Start=3.5 Length_End=3.5 LE_Flag=0 Surf_Type=2
  SS_Control "InboardFlap": UStart=0.125 UEnd=0.23 Length_C_Start=0.157886 Length_C_End=0.20881 Length_Start=3.5 Length_End=3.5 LE_Flag=0 Surf_Type=2
  SS_Control "Slats": UStart=0.125 UEnd=0.335 Length_C_Start=0.0992426 Length_C_End=0.193739 Length_Start=2.2 Length_End=2.2 LE_Flag=1 Surf_Type=2

Stack "F135PW100 TVC"
  location (X Y Z) 31.2 2.5 0, rotation 0 0 0
  symmetric about XZ
  bounding box size 18.75 9 4
  cross sections:
    n  XDelta  YDelta  ZDelta  shape
    0  0       0       0       ellipse Ellipse_Height=3.8 Ellipse_Width=3.8
    1  14.67   0       0       as above
    2  0       0       0       edit curve Width=4 Height=4 AbsoluteFlag=1 SymType=1 cubic Bezier points (X Y): 0.5 0, 0.5 -0.125, 0.5 -0.25, 0.5 -0.275, 0.1375 -0.5, 0.1375 -0.5, 0 -0.5, -0.1375 -0.5, -0.1375 -0.5, -0.5 -0.275, -0.5 -0.25, -0.5 -0.125, -0.5 0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
    3  4.08    0       0       edit curve Width=4 Height=1.5 AbsoluteFlag=0 SymType=0 linear points (X Y): 0.5 0, 0.5 -0.45, 0 -0.5, -0.5 -0.45, -0.5 0, -0.5 0.45, 0 0.5, 0.5 0.45, 0.5 0

Wing "Canard"
  location (X Y Z) 10 0 0, rotation 0 0 0
  symmetric about XZ
  bounding box size 11.9982 20.0895 0.736542
  totals: TotalSpan=20 TotalProjectedSpan=20 TotalChord=6.83333 TotalArea=136.667 TotalAR=2.92683 MAC=8.13546
  root: chord 12, twist 0, NACA 4-series Camber=0 CamberLoc=0.2 Theta=-1 ThickChord=0.06
  sections:
    n  Span  Root_Chord  Tip_Chord  Area     Sweep  Sweep_Location  Dihedral  Twist  Twist_Location  tip airfoil
    1  10    12          1.66667    68.3334  40     0               0         0      0.25            NACA 64-series A=1 IdealCl=0.2 ThickChord=0.06
  SS_Control "SS_CONT_0": UStart=0.3 UEnd=0.47 Length_C_Start=0.241384 Length_C_End=0.612264 Length_Start=1.4 Length_End=1.4 LE_Flag=0 Surf_Type=2

Stack "StackGeom"
  location (X Y Z) 10 0 0, rotation 0 0 0
  bounding box size 25 12 1.77258
  cross sections:
    n  XDelta  YDelta  ZDelta  shape
    0  0       0       0       point
    1  5       0       0       edit curve Width=12 Height=2.5 AbsoluteFlag=0 SymType=1 cubic Bezier points (X Y): 0.5 0, 0.45 0, 0.275958 0, 0 0, -0.275958 0, -0.45 0, -0.5 0, -0.354565 0.211349, -0.312852 0.248428, 0 0.5, 0.312852 0.248428, 0.354565 0.211349, 0.5 0
    2  20      0       0.35    as above
