OpenVSP model (file version 5), 13 components.
Geometry view with OpenVSP parameter names; values to 6 digits, angles in degrees, lengths in the model's unit.
Overall bounding box: X_Min=0 X_Len=50 Y_Min=-30 Y_Len=60 Z_Min=-9.25 Z_Len=20.25

Custom "UnfoldedWingspan"
  location (X Y Z) 0 0 0, rotation 0 0 0
  bounding box size 50 60 18.5
  Design: Height=18.5 Length=50 SquareFlag=0 Width=60
  custom script Box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

Custom "FoldedWingspan"
  location (X Y Z) 0 0 0, rotation 0 0 0
  bounding box size 50 35 18.5
  Design: Height=18.5 Length=50 SquareFlag=0 Width=35
  custom script Box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

Wing "ReferenceWing"
  location (X Y Z) 12 0 1, rotation 0 0 0
  symmetric about XZ
  bounding box size 26.9004 52.3068 2.15653
  totals: TotalSpan=52.3068 TotalProjectedSpan=52.3068 TotalChord=14.5262 TotalArea=759.822 TotalAR=3.60085 MAC=18.0397
  root: chord 26.9, twist 0, NACA 64-series A=1 IdealCl=0.2 ThickChord=0.08
  sections:
    n  Span     Root_Chord  Tip_Chord  Area     Sweep  Sweep_Location  Dihedral  Twist  Twist_Location  tip airfoil
    1  26.1534  26.9        2.1525     379.911  40     0               0         0      0.25            NACA 64-series A=1 IdealCl=0.2 ThickChord=0.02
  SS_Control "WingAilerons": EtaStart=0.68 EtaEnd=0.97 Length_C_Start=0.3 Length_C_End=0.3 Length_Start=3.02151 Length_End=0.868478 LE_Flag=0 Surf_Type=2

Conformal "MainWingFuelTanks", child of "ReferenceWing"
  location (X Y Z) 12 0 1, rotation 0 0 0; relative location 0 0 0, rotation 0 0 0
  symmetric about XZ
  bounding box size 15.0936 34.4624 1.50318
  Design: ChordTrimFlag=1 ChordTrimMax=0.85 ChordTrimMin=0.15 EtaTrimMax=0.66 EtaTrimMin=0.23 L01Max=1 L01Min=1 L0LenTrimMax=27.3137 L0LenTrimMin=0 LTrimMax=0.98 LTrimMin=0 OffSetEnds=1 Offset=0.1 Side1Trim=0.1 Side1TrimFlag=0 Side2Trim=0.1 Side2TrimFlag=0 Side3Trim=0.1 Side3TrimFlag=0 Side4Trim=0.1 Side4TrimFlag=0 UMaxTrimTypeFalg=2 UMinTrimTypeFalg=2 UTrimFlag=1 UTrimMax=0.66 UTrimMin=0.23 V1TrimBegin=0.924598 V1TrimEnd=0.0754021 V1TrimFlag=1 V2TrimBegin=0.422285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

Wing "VerticalTail"
  location (X Y Z) 38 7 1, rotation 40 0 0
  symmetric about XZ
  bounding box size 12 28.0975 6.15303
  totals: TotalSpan=18 TotalProjectedSpan=18 TotalChord=7.2 TotalArea=129.6 TotalAR=2.5 MAC=8.26667
  root: chord 12, twist 0, NACA 4-series Camber=0 CamberLoc=0.2 ThickChord=0.04
  sections:
    n  Span  Root_Chord  Tip_Chord  Area  Sweep  Sweep_Location  Dihedral  Twist  Twist_Location  tip airfoil
    1  9     12          2.4        64.8  43     0               0         0      0.25            NACA 4-series Camber=0 CamberLoc=0.2 ThickChord=0.1
  SS_Control "VerticalStabilizers": EtaStart=0 EtaEnd=1 Length_C_Start=1 Length_C_End=1 Length_Start=12 Length_End=2.4 LE_Flag=1 Surf_Type=2

Ellipsoid "NP"
  location (X Y Z) 24.4 0 10, rotation 0 0 0
  bounding box size 2 2 2
  Design: A_Radius=1 B_Radius=1 C_Radius=1

Ellipsoid "CG"
  location (X Y Z) 22 0 10, rotation 0 0 0
  bounding box size 2 2 2
  Design: A_Radius=1 B_Radius=1 C_Radius=1

Fuselage "FuselageCockpitGeometry"
  location (X Y Z) 0 0 0, rotation 0 0 0
  bounding box size 33 5.7 7.10859
  Design: Length=33
  cross sections:
    n  XLocPercent  YLocPercent  ZLocPercent  shape
    0  0            0            0            point
    1  0.106061     0            0            edit curve Width=3 Height=2.5 AbsoluteFlag=1 SymType=1 cubic Bezier points (X Y): 0.5 0.1, 0.269178 -0.37726, 0.170548 -0.44, 0 -0.44, -0.170548 -0.44, -0.269178 -0.37726, -0.5 0.1, -0.265068 0.5, -0.141781 0.56, 0 0.56, 0.141781 0.56, 0.265068 0.5, 0.5 0.1
    2  0.212121     0            0            edit curve Width=4.4 Height=3.7 AbsoluteFlag=1 SymType=1 cubic Bezier points (X Y): 0.5 0.135135, 0.219863 -0.459459, 0.06681 -0.459459, 0 -0.459459, -0.06681 -0.459459, -0.219863 -0.459459, -0.5 0.135135, -0.265068 0.540541, -0.141781 0.540541, 0 0.540541, 0.141781 0.540541, 0.265068 0.540541, 0.5 0.135135
    3  0.424242     0            0            edit curve Width=5.5 Height=7.1 AbsoluteFlag=1 SymType=1 cubic Bezier points (X Y): 0.499502 0.140845, 0.169489 -0.316901, 0.107223 -0.316901, 0 -0.316901, -0.107223 -0.316901, -0.169489 -0.316901, -0.499502 0.140845, -0.164259 0.683099, -0.128144 0.683099, 0 0.683099, 0.128144 0.683099, 0.164259 0.683099, 0.499502 0.140845
    4  0.484848     0            0            edit curve Width=5.7 Height=7 AbsoluteFlag=1 SymType=1 cubic Bezier points (X Y): 0.5 0.142857, 0.169988 -0.321429, 0.107223 -0.321429, 0 -0.321429, -0.107223 -0.321429, -0.169988 -0.321429, -0.5 0.142857, -0.133375 0.657143, -0.128144 0.657143, 0 0.657143, 0.128144 0.657143, 0.133375 0.657143, 0.5 0.142857
    5  1            0            0            edit curve Width=5.7 Height=4.5 AbsoluteFlag=1 SymType=1 cubic Bezier points (X Y): 0.5 0.222222, 0.169988 -0.5, 0.107223 -0.5, 0 -0.5, -0.107223 -0.5, -0.169988 -0.5, -0.5 0.222222, -0.133375 0.5, -0.128144 0.5, 0 0.5, 0.128144 0.5, 0.133375 0.5, 0.5 0.222222
  SS_Ellipse "SS_ELLIP_0": Center_U=0.602941 Center_W=0.75 U_Length=0.308824 W_Length=0.382353

Stack "F119 Engines"
  location (X Y Z) 32 2.5 1, rotation 0 0 0
  symmetric about XZ
  bounding box size 16.3333 8.33333 3.33333
  cross sections:
    n  XDelta   YDelta  ZDelta  shape
    0  0        0       0       ellipse Ellipse_Height=3.33333 Ellipse_Width=3.33333
    1  16.3333  0       0       as above

Stack "S-Ducts"
  location (X Y Z) 14.7 3.5 -0.7, rotation 0 0 0
  symmetric about XZ
  bounding box size 17.2391 10.8203 4.61667
  cross sections:
    n  XDelta  YDelta  ZDelta  shape
    0  0       0       0       edit curve Width=3 Height=2.5 AbsoluteFlag=0 SymType=0 linear points (X Y): 0.4 0, 0.15 -0.5, -0.25 -0.5, -0.65 -0.5, -0.4 0, -0.15 0.5, 0.25 0.5, 0.65 0.5, 0.4 0
    1  6.8     -1.8    1.9     edit curve Width=3 Height=2.5 AbsoluteFlag=0 SymType=0 linear points (X Y): 0.5 0, 0.25 -0.25, 0 -0.5, -0.5 -0.5, -0.5 0, -0.5 0.5, 0 0.5, 0.5 0.5, 0.5 0
    2  7       0.8     -0.3    as above
    3  3.5     0       0.1     ellipse Ellipse_Height=3.33333 Ellipse_Width=3.33333

Custom "WeaponBox"
  location (X Y Z) 19 0 -1.25, rotation 0 0 0
  bounding box size 12 6 1.3
  Design: Height=1.3 Length=12 SquareFlag=0 Width=6
  custom script Box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

Custom "Box"
  location (X Y Z) 20 5 -1, rotation 60 0 0
  symmetric about XZ
  bounding box size 10 10.8879 0.887917
  Design: Height=0.65 Length=10 SquareFlag=0 Width=0.65
  custom script Box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

Human "HumanGeom"
  location (X Y Z) 14 0 2, rotation 0 5 0
  bounding box size 2.50373 2.09957 4.58424
  mass: Density=68.4985 Shell_Flag=0 Mass_Area=1 Mass_Prior=0
  Anthropometric: Age=30 AutoDensity=1 BMI=27.7 BMI_pct=0.5 GenderFlag=0 LenUnit=4 Mass=188.306 MassUnit=3 SitFrac=0.51 Stature=5.76115 Stature_pct=0.5 Volume=2.74905

VSPAERO settings (reference component "ReferenceWing"): Sref=655.68 bref=51.2 cref=15.9039 Xcg=0 Ycg=0 Zcg=0 AlphaStart=0 AlphaEnd=45 AlphaNpts=11 BetaStart=0 BetaEnd=0 BetaNpts=1 MachStart=0.85 MachEnd=0.85 MachNpts=1 ReCref=1.2421e+09 Vinf=100 Rho=0.002377
  control group "Ailerons": DeflectionAngle=45
  control group "LeftRuddervator": DeflectionAngle=0
  control group "RightRuddervator": DeflectionAngle=0
