OpenVSP model (file version 5), 8 components.
Geometry view with OpenVSP parameter names; values to 6 digits, angles in degrees, lengths in the model's unit.
Overall bounding box: X_Min=0 X_Len=50.25 Y_Min=-32 Y_Len=64 Z_Min=-28 Z_Len=64

Blank "Measurement_Devices"
  location (X Y Z) 0 0 0, rotation 0 0 0

Custom "3D MachCone", child of "Measurement_Devices"
  location (X Y Z) 40 0 4, rotation -180 0 -180; relative location 40 0 4, rotation 0 180 0
  bounding box size 40 64 64
  Design: Diameter=64 Height=40
  custom script Cone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

Custom "RFP_Dimension_Limits", child of "Measurement_Devices"
  location (X Y Z) 0 0 5, rotation 0 0 0
  bounding box size 50 60 18.5
  Design: Height=18.5 Length=50 SquareFlag=0 Width=60
  custom script Box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

Blank "FullVehicle"
  location (X Y Z) 0 0 0, rotation 0 0 0

Blank "General_Body", child of "FullVehicle"
  location (X Y Z) 0 0 0, rotation 0 0 0

Blank "FlyingSurfaces", child of "FullVehicle"
  location (X Y Z) 0 0 0, rotation 0 0 0

Stack "F135PW100 TVC"
  location (X Y Z) 31.5 3 0, rotation 0 0 0
  symmetric about XZ
  bounding box size 18.75 10 4
  cross sections:
    n  XDelta  YDelta  ZDelta  shape
    0  0       0       0       ellipse Ellipse_Height=3.8 Ellipse_Width=3.8
    1  14.67   0       0       as above
    2  0       0       0       edit curve Width=4 Height=4 AbsoluteFlag=1 SymType=0 linear points (X Y): 0.5 0, 0.5 -0.45, 0 -0.5, -0.5 -0.45, -0.5 0, -0.5 0.45, 0 0.5, 0.5 0.45, 0.5 0
    3  4.08    0       0       edit curve Width=4 Height=1.5 AbsoluteFlag=0 SymType=0 linear points (X Y): 0.5 0, 0.5 -0.45, 0 -0.5, -0.5 -0.45, -0.5 0, -0.5 0.45, 0 0.5, 0.5 0.45, 0.5 0

Fuselage "JohnFuselage"
  location (X Y Z) 0 0 0, rotation 0 0 0
  bounding box size 46.25 14 6.13557
  Design: Length=46.25
  cross sections:
    n  XLocPercent  YLocPercent  ZLocPercent  shape
    0  0            0            0            point
    1  0.25         0            0            edit curve Width=7 Height=6 AbsoluteFlag=1 SymType=1 cubic Bezier points (X Y): 0.5 0, 0.293836 -0.333333, 0.285714 -0.333333, 0 -0.333333, -0.285714 -0.333333, -0.293836 -0.333333, -0.5 0, -0.129452 0.347603, -0.142857 0.666667, 0 0.666667, 0.142857 0.666667, 0.129452 0.347603, 0.5 0
    2  0.35         0            0            edit curve Width=8 Height=4 AbsoluteFlag=1 SymType=1 cubic Bezier points (X Y): 0.5 0.125, 0.25 -0.5, 0.25 -0.5, 0 -0.5, -0.25 -0.5, -0.25 -0.5, -0.5 0.125, -0.25 0.5, -0.0625 0.5, 0 0.5, 0.0625 0.5, 0.25 0.5, 0.5 0.125
    3  0.55         0            0            edit curve Width=10 Height=4 AbsoluteFlag=1 SymType=1 cubic Bezier points (X Y): 0.5 0.25, 0.25 -0.5, 0.25 -0.5, 0 -0.5, -0.25 -0.5, -0.25 -0.5, -0.5 0.25, -0.25 0.5, -0.0625 0.5, 0 0.5, 0.0625 0.5, 0.25 0.5, 0.5 0.25
    4  0.7          0            0            edit curve Width=10 Height=4 AbsoluteFlag=1 SymType=1 cubic Bezier points (X Y): 0.5 0.125, 0.5 0, 0.5 0, 0.5 -0.125, 0.417136 -0.20924, 0.414449 -0.23275, 0.357143 -0.5, 0.299475 -0.5, 0.239286 -0.5, 0.214286 -0.5, 0.189286 -0.5, 0.0964286 -0.5, 0.0714286 -0.5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
    5  1            0            0            edit curve Width=14 Height=4 AbsoluteFlag=1 SymType=1 cubic Bezier points (X Y): 0.5 0.125, 0.5 0, 0.5 0, 0.5 -0.125, 0.417136 -0.20924, 0.414449 -0.23275, 0.357143 -0.5, 0.299475 -0.5, 0.239286 -0.5, 0.214286 -0.5, 0.189286 -0.5, 0.0964286 -0.5, 0.0714286 -0.5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
