OpenVSP model (file version 5), 11 components.
Geometry view with OpenVSP parameter names; values to 6 digits, angles in degrees, lengths in the model's unit.
Overall bounding box: X_Min=0 X_Len=50 Y_Min=-32 Y_Len=64 Z_Min=-32 Z_Len=64

Blank "Measurement_Devices"
  location (X Y Z) 0 0 0, rotation 0 0 0

Custom "3D MachCone", child of "Measurement_Devices"
  location (X Y Z) 40 0 0, rotation -180 0 -180; relative location 40 0 0, rotation 0 180 0
  bounding box size 40 64 64
  Design: Diameter=64 Height=40
  custom script Cone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

Custom "RFP_Dimension_Limits", child of "Measurement_Devices"
  location (X Y Z) 0 0 5, rotation 0 0 0
  bounding box size 50 60 18.5
  Design: Height=18.5 Length=50 SquareFlag=0 Width=60
  custom script Box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

Blank "FullVehicle"
  location (X Y Z) 0 0 0, rotation 0 0 0

Blank "General_Body", child of "FullVehicle"
  location (X Y Z) 0 0 0, rotation 0 0 0

Fuselage "FuselageGeom", child of "General_Body"
  location (X Y Z) 0 0 0, rotation 0 0 0
  bounding box size 45.9 7 6
  Design: Length=45.9
  cross sections:
    n  XLocPercent  YLocPercent  ZLocPercent  shape
    0  0            0            0            edit curve Width=0 Height=0 AbsoluteFlag=0 SymType=0 cubic Bezier points (X Y): 0 0, 0 0, 0 0, 0 0, 0 0, 0 0, 0 0
    1  0.043573     0            0            edit curve Width=3 Height=2 AbsoluteFlag=1 SymType=1 cubic Bezier points (X Y): 0.5 0, 0.25 -0.5, 0.25 -0.5, 0 -0.5, -0.25 -0.5, -0.25 -0.5, -0.5 0, -0.25 0.5, -0.25 0.5, 0 0.5, 0.25 0.5, 0.25 0.5, 0.5 0
    2  0.130719     0            0            edit curve Width=3.66667 Height=4 AbsoluteFlag=1 SymType=1 cubic Bezier points (X Y): 0.5 0, 0.25 -0.5, 0.25 -0.5, 0 -0.5, -0.25 -0.5, -0.25 -0.5, -0.5 0, -0.25 0.5, -0.25 0.5, 0 0.5, 0.25 0.5, 0.25 0.5, 0.5 0
    3  0.261438     0            0            edit curve Width=4.66667 Height=6 AbsoluteFlag=1 SymType=1 cubic Bezier points (X Y): 0.5 0.0833333, 0.25 -0.333333, 0.25 -0.333333, 0 -0.333333, -0.25 -0.333333, -0.25 -0.333333, -0.5 0.0833333, -0.181818 0.666667, -0.181818 0.666667, 0 0.666667, 0.181818 0.666667, 0.181818 0.666667, 0.5 0.0833333
    4  0.566449     0            0            edit curve Width=7 Height=4.5 AbsoluteFlag=1 SymType=1 cubic Bezier points (X Y): 0.5 0.1, 0.142857 0.1, 0.357143 -0.444444, 0 -0.444444, -0.357143 -0.444444, -0.142857 0.1, -0.5 0.1, -0.171429 0.555556, -0.171429 0.555556, 0 0.555556, 0.171429 0.555556, 0.171429 0.555556, 0.5 0.1
    5  1            0            0            edit curve Width=7 Height=4 AbsoluteFlag=1 SymType=1 cubic Bezier points (X Y): 0.5 0, 0.285714 -0.1, 0.171429 -0.5, 0 -0.5, -0.171429 -0.5, -0.285714 -0.1, -0.5 0, -0.285714 0.1, -0.171429 0.5, 0 0.5, 0.171429 0.5, 0.285714 0.1, 0.5 0
  SS_Ellipse "SS_ELLIP_0": Center_U=0.481481 Center_W=0.75 U_Length=0.18 W_Length=0.35

Stack "DuctGeom", child of "General_Body"
  location (X Y Z) 23.4 2.7 -1, rotation 0 0 0
  symmetric about XZ
  bounding box size 25.8828 8.13887 2.75
  cross sections:
    n  XDelta  YDelta  ZDelta  shape
    0  0       0       0       edit curve Width=2 Height=2 AbsoluteFlag=1 SymType=0 cubic Bezier points (X Y): 0.5 0, 0.2 -0.5, 0.2 -0.5, 0 -0.5, -0.8 -0.5, -0.8 -0.5, -0.5 0, -0.2 0.5, -0.2 0.5, 0 0.5, 0.8 0.5, 0.8 0.5, 0.5 0
    1  6       0       0       as above
    2  6       0       0       as above
    3  14      0.3     1       edit curve Width=2 Height=1.5 AbsoluteFlag=0 SymType=0 linear points (X Y): 0.5 0, 0.3 -0.5, 0 -0.5, -0.5 -0.5, -0.5 0, -0.5 0.5, 0 0.5, 0.3 0.5, 0.5 0

Blank "FlyingSurfaces", child of "FullVehicle"
  location (X Y Z) 0 0 0, rotation 0 0 0

Stack "F135PW100 TVC"
  location (X Y Z) 31.2 0 0, rotation 0 0 0
  bounding box size 18.75 4 4
  cross sections:
    n  XDelta  YDelta  ZDelta  shape
    0  0       0       0       ellipse Ellipse_Height=3.8 Ellipse_Width=3.8
    1  14.67   0       0       as above
    2  0       0       0       edit curve Width=4 Height=4 AbsoluteFlag=1 SymType=1 cubic Bezier points (X Y): 0.5 0, 0.5 -0.125, 0.5 -0.25, 0.5 -0.275, 0.1375 -0.5, 0.1375 -0.5, 0 -0.5, -0.1375 -0.5, -0.1375 -0.5, -0.5 -0.275, -0.5 -0.25, -0.5 -0.125, -0.5 0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
    3  4.08    0       0       edit curve Width=4 Height=1.5 AbsoluteFlag=0 SymType=0 linear points (X Y): 0.5 0, 0.5 -0.45, 0 -0.5, -0.5 -0.45, -0.5 0, -0.5 0.45, 0 0.5, 0.5 0.45, 0.5 0

Wing "WingGeom"
  location (X Y Z) 20.5 0 0, rotation 0 0 0
  symmetric about XZ
  bounding box size 27.5008 43.5 1.65936
  totals: TotalSpan=43.5 TotalProjectedSpan=43.5 TotalChord=15.125 TotalArea=657.938 TotalAR=2.87603 MAC=18.5
  root: chord 27.5, twist 0, NACA 63-series A=1 IdealCl=0.2 ThickChord=0.06
  sections:
    n  Span   Root_Chord  Tip_Chord  Area     Sweep  Sweep_Location  Dihedral  Twist  Twist_Location  tip airfoil
    1  21.75  27.5        2.75       328.969  33     0.25            0         0      0.25            NACA 4-series Camber=0 CamberLoc=0.2 ThickChord=0.1
  SS_Control "InboardElevon": UStart=0.395 UEnd=0.5 Length_C_Start=0.130883 Length_C_End=0.198347 Length_Start=3 Length_End=3 LE_Flag=0 Surf_Type=2
  SS_Control "OutboardElevon": UStart=0.5 UEnd=0.595 Length_C_Start=0.198347 Length_C_End=0.37169 Length_Start=3 Length_End=3 LE_Flag=0 Surf_Type=2
  SS_Control "Slats": UStart=0.395 UEnd=0.595 Length_C_Start=0.0785297 Length_C_End=0.223014 Length_Start=1.8 Length_End=1.8 LE_Flag=1 Surf_Type=2
  SS_Control "SS_CONT_4": EtaStart=0.985 EtaEnd=0.815 Length_C_Start=0.480577 Length_C_End=0.204673 Length_Start=1.5 Length_End=1.5 LE_Flag=0 Surf_Type=2

Mesh "MeshGeom"
  location (X Y Z) 0 0 0, rotation 0 0 0
  bounding box size 49.95 43.5 6
  triangle mesh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
