OpenVSP model (file version 5), 60 components.
Geometry view with OpenVSP parameter names; values to 6 digits, angles in degrees, lengths in the model's unit.
Overall bounding box: X_Min=-0.148623 X_Len=50.1486 Y_Min=-43.827 Y_Len=87.654 Z_Min=-43.827 Z_Len=87.654

Wing "V-Tail"
  location (X Y Z) 35 4.75 0.6, rotation 55 0 0
  symmetric about XZ
  bounding box size 11.6927 22.9515 9.59742
  totals: TotalSpan=22.4499 TotalProjectedSpan=22.4499 TotalChord=8.01784 TotalArea=180 TotalAR=2.8 MAC=8.57927
  root: chord 11.6927, twist 0, NACA 64-series A=1 IdealCl=0 ThickChord=0.06
  sections:
    n  Span    Root_Chord  Tip_Chord  Area  Sweep  Sweep_Location  Dihedral  Twist  Twist_Location  tip airfoil
    1  11.225  11.6927     4.343      90    30     0               0         0      0.25            NACA 64-series A=1 IdealCl=0 ThickChord=0
  SS_Control "SS_CONT_0": EtaStart=0.1 EtaEnd=1 Length_C_Start=0.18252 Length_C_End=0.460512 Length_Start=2 Length_End=2 LE_Flag=0 Surf_Type=2

Stack "Engine F135"
  location (X Y Z) 32.365 3 0, rotation 0 0 0
  symmetric about XZ
  bounding box size 16.3333 9.58333 3.58333
  cross sections:
    n  XDelta   YDelta  ZDelta  shape
    0  0        0       0       circle Circle_Diameter=3.58333
    1  16.3333  0       0       as above

Stack "Inlets"
  location (X Y Z) 20.4 6.5 -1, rotation 0 0 0
  symmetric about XZ
  bounding box size 13.6689 17.3228 2.5
  cross sections:
    n  XDelta  YDelta  ZDelta  shape
    0  0       0       0       edit curve Width=3.5 Height=2 AbsoluteFlag=1 SymType=0 linear points (X Y): 0.5 0, 0.375 -0.5, -0.125 -0.5, -0.625 -0.5, -0.5 0, -0.375 0.5, 0.125 0.5, 0.625 0.5, 0.5 0
    1  9       0       0       edit curve Width=3 Height=2 AbsoluteFlag=1 SymType=0 linear points (X Y): 0.5 0, 0.375 -0.5, -0.125 -0.5, -0.625 -0.5, -0.5 0, -0.375 0.5, 0.125 0.5, 0.625 0.5, 0.5 0
    2  4.8     0       1.5     edit curve Width=3 Height=0 AbsoluteFlag=1 SymType=0 linear points (X Y): 0.5 0, 0.375 -0.5, -0.125 -0.5, -0.625 -0.5, -0.5 0, -0.375 0.5, 0.125 0.5, 0.625 0.5, 0.5 0

Stack "Canopy"
  location (X Y Z) 5.2459 0 1.47541, rotation 0 -7.13115 0
  bounding box size 11.144 4.75729 4.94326
  cross sections:
    n  XDelta   YDelta  ZDelta  shape
    0  0        0       0       point
    1  6.98684  0       0       edit curve Width=4.66578 Height=3.72428 AbsoluteFlag=0 SymType=1 cubic Bezier points (X Y): 0.483553 -0.426382, 0.302632 -0.142127, 0.275958 -0.148026, 0 -0.148026, -0.275958 -0.148026, -0.302632 -0.142127, -0.483553 -0.426382, -0.405774 -0.146777, -0.275958 0.5, 0 0.5, 0.275958 0.5, 0.405774 -0.146777, 0.483553 -0.426382
    2  3.78947  0       0       point

Wing "Stabilators"
  location (X Y Z) 35 4.75 0, rotation 0 0 0
  symmetric about XZ
  bounding box size 14.501 29.5 1.32018
  totals: TotalSpan=20 TotalProjectedSpan=20 TotalChord=9.5 TotalArea=190 TotalAR=2.10526 MAC=9.89474
  root: chord 11, twist 0, NACA 64-series A=1 IdealCl=0 ThickChord=0.12
  sections:
    n  Span  Root_Chord  Tip_Chord  Area  Sweep  Sweep_Location  Dihedral  Twist  Twist_Location  tip airfoil
    1  5     11          11         55    35     0               0         0      0.25            NACA 4-series Camber=0 CamberLoc=0.2 ThickChord=0.1
    2  5     11          5          40    35     0               0         0      0.25            as above

Stack "Thrust Vector Nozzle"
  location (X Y Z) 47 3 0, rotation 0 0 0
  symmetric about XZ
  bounding box size 2.5 10.0373 4.44666
  cross sections:
    n  XDelta  YDelta  ZDelta  shape
    0  0       0       0       edit curve Width=3.66367 Height=4.34657 AbsoluteFlag=0 SymType=1 linear points (X Y): 0.500569 0, 0.5 -0.335526, 0 -0.483553, -0.5 -0.335526, -0.500569 0, -0.5 0.375, 0 0.539474, 0.5 0.375, 0.500569 0
    1  2.5     0       0       edit curve Width=3.5 Height=2.74286 AbsoluteFlag=0 SymType=1 linear points (X Y): 0.500569 0, 0.500569 -0.427107, 0 -0.570615, -0.500569 -0.427107, -0.500569 0, -0.500569 0.437358, 0 0.591116, 0.500569 0.437358, 0.500569 0

Custom "Conical Shock Mach 2.0"
  location (X Y Z) 50 0 0, rotation 0 0 180
  bounding box size 50 87.654 87.654
  Design: Diameter=87.654 Height=50
  custom script Cone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

Fuselage "Fuselage"
  location (X Y Z) 0 0 0, rotation 0 0 0
  bounding box size 47.1486 11.4819 5.39233
  Design: Length=47
  cross sections:
    n  XLocPercent  YLocPercent  ZLocPercent  shape
    0  0            0            0            circle Circle_Diameter=0.4
    1  0.124372     0            0            edit curve Width=4 Height=4 AbsoluteFlag=1 SymType=1 cubic Bezier points (X Y): 0.5 -0.00328947, 0.375 -0.375, 0.25 -0.5, 0 -0.5, -0.25 -0.5, -0.375 -0.375, -0.5 -0.00328947, -0.375 0.375, -0.25 0.5, 0 0.5, 0.25 0.5, 0.375 0.375, 0.5 -0.00328947
    2  0.4          0            0            edit curve Width=11 Height=5 AbsoluteFlag=1 SymType=1 cubic Bezier points (X Y): 0.5 0, 0.318182 -0.2, 0.318182 -0.4, 0 -0.4, -0.318182 -0.4, -0.318182 -0.2, -0.5 0, -0.272727 0.2, -0.181818 0.6, 0 0.6, 0.181818 0.6, 0.272727 0.2, 0.5 0
    3  0.576445     0            0            edit curve Width=11 Height=5 AbsoluteFlag=1 SymType=1 cubic Bezier points (X Y): 0.5 0, 0.318182 -0.4, 0.318182 -0.4, 0 -0.4, -0.318182 -0.4, -0.318182 -0.4, -0.5 0, -0.274604 0.6, -0.246482 0.6, 0 0.6, 0.246482 0.6, 0.274604 0.6, 0.5 0
    4  0.75289      0            0            edit curve Width=11 Height=4 AbsoluteFlag=1 SymType=1 cubic Bezier points (X Y): 0.5 0, 0.5 -0.125, 0.5 -0.125, 0.454545 -0.375, 0.327273 -0.5, 0.327273 -0.5, 0.272727 -0.5, 0.218182 -0.5, 0.218182 -0.5, 0.0909091 -0.375, 0.0454545 -0.3, 0.0272727 -0.3, 0 -0.3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
    5  1            0            0            as above
  SS_Ellipse "SS_ELLIP_0": Center_U=0.323529 Center_W=0.75 U_Length=0.137255 W_Length=0.27451

Custom "Avionics Tray", child of "Fuselage"
  location (X Y Z) 11.31 -1 0.0217391, rotation 0 0 0
  bounding box size 1.88265 1.5 2
  Design: Height=2 Length=1.88265 SquareFlag=0 Width=1.5
  custom script Box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

Custom "Avionics Tray", child of "Avionics Tray"
  location (X Y Z) 8.86232 0 -1.5, rotation 0 0 0
  bounding box size 6.54719 1.42659 0.642842
  Design: Height=0.642842 Length=6.54719 SquareFlag=0 Width=1.42659
  custom script Box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

Human "HumanGeom", child of "Fuselage"
  location (X Y Z) 10.25 0 0.27971, rotation 0 15 0
  bounding box size 3.20031 2.13648 4.44947
  mass: Density=68.2729 Shell_Flag=0 Mass_Area=1 Mass_Prior=0
  Anthropometric: Age=30 AutoDensity=1 BMI=27.7 BMI_pct=0.5 GenderFlag=0 LenUnit=4 Mass=204.243 MassUnit=3 SitFrac=0.51 Stature=6 Stature_pct=0.823775 Volume=2.99156

Custom "Ejection Seat", child of "Fuselage"
  location (X Y Z) 9.80435 0 -1.02464, rotation 0 -90 0
  bounding box size 2.7941 1.25 3.7561
  Design: BackAngle=15 BackHeight=3.35092 BackThick=0.138714 SeatHeight=0.45 SeatLength=1.86219 Width=1.25
  custom script Seat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

Stack "A2A Aim-120C Qty 2", child of "Fuselage"
  location (X Y Z) 15.6661 0.65 -1.16667, rotation 45 0 0
  symmetric about XZ
  bounding box size 12 2.14853 0.848528
  cross sections:
    n  XDelta  YDelta  ZDelta  shape
    0  0       0       0       point
    1  1       0       0       circle Circle_Diameter=0.583333
    2  11      0       0       circle Circle_Diameter=0.6

Wing "Forward Fin", child of "A2A Aim-120C Qty 2"
  location (X Y Z) 20.8333 0.65 -1.16667, rotation -135 0 0
  symmetric about XZ
  bounding box size 1.38051 1.39767 0.699837
  totals: TotalSpan=1.70317 TotalProjectedSpan=1.70317 TotalChord=0.690256 TotalArea=1.17563 TotalAR=2.46745 MAC=0.920341
  root: chord 1.38051, twist 0, NACA 4-series Camber=0 CamberLoc=0.2 ThickChord=0.1
  sections:
    n  Span      Root_Chord  Tip_Chord  Area      Sweep  Sweep_Location  Dihedral  Twist  Twist_Location  tip airfoil
    1  0.851587  1.38051     0          0.587813  57     0               0         0      0.25            as above

Wing "Forward Fin", child of "Forward Fin"
  location (X Y Z) 20.8333 0.65 -1.16667, rotation -45 0 0
  symmetric about XZ
  bounding box size 1.38051 2.602 0.699837
  totals: TotalSpan=1.70317 TotalProjectedSpan=1.70317 TotalChord=0.690256 TotalArea=1.17563 TotalAR=2.46745 MAC=0.920341
  root: chord 1.38051, twist 0, NACA 4-series Camber=0 CamberLoc=0.2 ThickChord=0.1
  sections:
    n  Span      Root_Chord  Tip_Chord  Area      Sweep  Sweep_Location  Dihedral  Twist  Twist_Location  tip airfoil
    1  0.851587  1.38051     0          0.587813  57     0               0         0      0.25            as above

Wing "Forward Fin", child of "Forward Fin"
  location (X Y Z) 20.8333 0.65 -1.16667, rotation 45 0 0
  symmetric about XZ
  bounding box size 1.38051 2.602 0.699837
  totals: TotalSpan=1.70317 TotalProjectedSpan=1.70317 TotalChord=0.690256 TotalArea=1.17563 TotalAR=2.46745 MAC=0.920341
  root: chord 1.38051, twist 0, NACA 4-series Camber=0 CamberLoc=0.2 ThickChord=0.1
  sections:
    n  Span      Root_Chord  Tip_Chord  Area      Sweep  Sweep_Location  Dihedral  Twist  Twist_Location  tip airfoil
    1  0.851587  1.38051     0          0.587813  57     0               0         0      0.25            as above

Wing "Forward Fin", child of "Forward Fin"
  location (X Y Z) 20.8333 0.65 -1.16667, rotation 135 0 0
  symmetric about XZ
  bounding box size 1.38051 1.39767 0.699837
  totals: TotalSpan=1.70317 TotalProjectedSpan=1.70317 TotalChord=0.690256 TotalArea=1.17563 TotalAR=2.46745 MAC=0.920341
  root: chord 1.38051, twist 0, NACA 4-series Camber=0 CamberLoc=0.2 ThickChord=0.1
  sections:
    n  Span      Root_Chord  Tip_Chord  Area      Sweep  Sweep_Location  Dihedral  Twist  Twist_Location  tip airfoil
    1  0.851587  1.38051     0          0.587813  57     0               0         0      0.25            as above

Wing "Back Fin", child of "A2A Aim-120C Qty 2"
  location (X Y Z) 26.3333 0.65 -1.16667, rotation 45 0 0
  symmetric about XZ
  bounding box size 1.3 2.54937 0.670672
  totals: TotalSpan=1.6368 TotalProjectedSpan=1.6368 TotalChord=1.10977 TotalArea=1.8283 TotalAR=1.46535 MAC=1.17013
  root: chord 1.3, twist 0, NACA 4-series Camber=0 CamberLoc=0.2 ThickChord=0.1
  sections:
    n  Span      Root_Chord  Tip_Chord  Area      Sweep    Sweep_Location  Dihedral  Twist  Twist_Location  tip airfoil
    1  0.424747  1.3         1.3        0.552172  0        0               0         0      0.25            as above
    2  0.393651  1.3         0.539087   0.361979  61.0714  0               0         0      0.25            as above

Wing "Back Fin", child of "Back Fin"
  location (X Y Z) 26.3333 0.65 -1.16667, rotation -135 0 0
  symmetric about XZ
  bounding box size 1.3 1.39198 0.670672
  totals: TotalSpan=1.6368 TotalProjectedSpan=1.6368 TotalChord=1.10977 TotalArea=1.8283 TotalAR=1.46535 MAC=1.17013
  root: chord 1.3, twist 0, NACA 4-series Camber=0 CamberLoc=0.2 ThickChord=0.1
  sections:
    n  Span      Root_Chord  Tip_Chord  Area      Sweep    Sweep_Location  Dihedral  Twist  Twist_Location  tip airfoil
    1  0.424747  1.3         1.3        0.552172  0        0               0         0      0.25            as above
    2  0.393651  1.3         0.539087   0.361979  61.0714  0               0         0      0.25            as above

Wing "Back Fin", child of "Back Fin"
  location (X Y Z) 26.3333 0.65 -1.16667, rotation -45 0 0
  symmetric about XZ
  bounding box size 1.3 2.54937 0.670672
  totals: TotalSpan=1.6368 TotalProjectedSpan=1.6368 TotalChord=1.10977 TotalArea=1.8283 TotalAR=1.46535 MAC=1.17013
  root: chord 1.3, twist 0, NACA 4-series Camber=0 CamberLoc=0.2 ThickChord=0.1
  sections:
    n  Span      Root_Chord  Tip_Chord  Area      Sweep    Sweep_Location  Dihedral  Twist  Twist_Location  tip airfoil
    1  0.424747  1.3         1.3        0.552172  0        0               0         0      0.25            as above
    2  0.393651  1.3         0.539087   0.361979  61.0714  0               0         0      0.25            as above

Wing "Back Fin", child of "Back Fin"
  location (X Y Z) 26.3333 0.65 -1.16667, rotation 135 0 0
  symmetric about XZ
  bounding box size 1.3 1.39198 0.670672
  totals: TotalSpan=1.6368 TotalProjectedSpan=1.6368 TotalChord=1.10977 TotalArea=1.8283 TotalAR=1.46535 MAC=1.17013
  root: chord 1.3, twist 0, NACA 4-series Camber=0 CamberLoc=0.2 ThickChord=0.1
  sections:
    n  Span      Root_Chord  Tip_Chord  Area      Sweep    Sweep_Location  Dihedral  Twist  Twist_Location  tip airfoil
    1  0.424747  1.3         1.3        0.552172  0        0               0         0      0.25            as above
    2  0.393651  1.3         0.539087   0.361979  61.0714  0               0         0      0.25            as above

Stack "A2A Aim-120C Qty 2", child of "Fuselage"
  location (X Y Z) 14.3328 1.3 -1.26667, rotation 45 0 0
  symmetric about XZ
  bounding box size 12 3.44853 0.848528
  cross sections:
    n  XDelta  YDelta  ZDelta  shape
    0  0       0       0       point
    1  1       0       0       circle Circle_Diameter=0.583333
    2  11      0       0       circle Circle_Diameter=0.6

Wing "Forward Fin", child of "A2A Aim-120C Qty 2"
  location (X Y Z) 19.5 1.3 -1.26667, rotation -135 0 0
  symmetric about XZ
  bounding box size 1.38051 2.69767 0.699837
  totals: TotalSpan=1.70317 TotalProjectedSpan=1.70317 TotalChord=0.690256 TotalArea=1.17563 TotalAR=2.46745 MAC=0.920341
  root: chord 1.38051, twist 0, NACA 4-series Camber=0 CamberLoc=0.2 ThickChord=0.1
  sections:
    n  Span      Root_Chord  Tip_Chord  Area      Sweep  Sweep_Location  Dihedral  Twist  Twist_Location  tip airfoil
    1  0.851587  1.38051     0          0.587813  57     0               0         0      0.25            as above

Wing "Forward Fin", child of "Forward Fin"
  location (X Y Z) 19.5 1.3 -1.26667, rotation -45 0 0
  symmetric about XZ
  bounding box size 1.38051 3.902 0.699837
  totals: TotalSpan=1.70317 TotalProjectedSpan=1.70317 TotalChord=0.690256 TotalArea=1.17563 TotalAR=2.46745 MAC=0.920341
  root: chord 1.38051, twist 0, NACA 4-series Camber=0 CamberLoc=0.2 ThickChord=0.1
  sections:
    n  Span      Root_Chord  Tip_Chord  Area      Sweep  Sweep_Location  Dihedral  Twist  Twist_Location  tip airfoil
    1  0.851587  1.38051     0          0.587813  57     0               0         0      0.25            as above

Wing "Forward Fin", child of "Forward Fin"
  location (X Y Z) 19.5 1.3 -1.26667, rotation 45 0 0
  symmetric about XZ
  bounding box size 1.38051 3.902 0.699837
  totals: TotalSpan=1.70317 TotalProjectedSpan=1.70317 TotalChord=0.690256 TotalArea=1.17563 TotalAR=2.46745 MAC=0.920341
  root: chord 1.38051, twist 0, NACA 4-series Camber=0 CamberLoc=0.2 ThickChord=0.1
  sections:
    n  Span      Root_Chord  Tip_Chord  Area      Sweep  Sweep_Location  Dihedral  Twist  Twist_Location  tip airfoil
    1  0.851587  1.38051     0          0.587813  57     0               0         0      0.25            as above

Wing "Forward Fin", child of "Forward Fin"
  location (X Y Z) 19.5 1.3 -1.26667, rotation 135 0 0
  symmetric about XZ
  bounding box size 1.38051 2.69767 0.699837
  totals: TotalSpan=1.70317 TotalProjectedSpan=1.70317 TotalChord=0.690256 TotalArea=1.17563 TotalAR=2.46745 MAC=0.920341
  root: chord 1.38051, twist 0, NACA 4-series Camber=0 CamberLoc=0.2 ThickChord=0.1
  sections:
    n  Span      Root_Chord  Tip_Chord  Area      Sweep  Sweep_Location  Dihedral  Twist  Twist_Location  tip airfoil
    1  0.851587  1.38051     0          0.587813  57     0               0         0      0.25            as above

Wing "Back Fin", child of "A2A Aim-120C Qty 2"
  location (X Y Z) 25 1.3 -1.26667, rotation 45 0 0
  symmetric about XZ
  bounding box size 1.3 3.84937 0.670672
  totals: TotalSpan=1.6368 TotalProjectedSpan=1.6368 TotalChord=1.10977 TotalArea=1.8283 TotalAR=1.46535 MAC=1.17013
  root: chord 1.3, twist 0, NACA 4-series Camber=0 CamberLoc=0.2 ThickChord=0.1
  sections:
    n  Span      Root_Chord  Tip_Chord  Area      Sweep    Sweep_Location  Dihedral  Twist  Twist_Location  tip airfoil
    1  0.424747  1.3         1.3        0.552172  0        0               0         0      0.25            as above
    2  0.393651  1.3         0.539087   0.361979  61.0714  0               0         0      0.25            as above

Wing "Back Fin", child of "Back Fin"
  location (X Y Z) 25 1.3 -1.26667, rotation -135 0 0
  symmetric about XZ
  bounding box size 1.3 2.69198 0.670672
  totals: TotalSpan=1.6368 TotalProjectedSpan=1.6368 TotalChord=1.10977 TotalArea=1.8283 TotalAR=1.46535 MAC=1.17013
  root: chord 1.3, twist 0, NACA 4-series Camber=0 CamberLoc=0.2 ThickChord=0.1
  sections:
    n  Span      Root_Chord  Tip_Chord  Area      Sweep    Sweep_Location  Dihedral  Twist  Twist_Location  tip airfoil
    1  0.424747  1.3         1.3        0.552172  0        0               0         0      0.25            as above
    2  0.393651  1.3         0.539087   0.361979  61.0714  0               0         0      0.25            as above

Wing "Back Fin", child of "Back Fin"
  location (X Y Z) 25 1.3 -1.26667, rotation -45 0 0
  symmetric about XZ
  bounding box size 1.3 3.84937 0.670672
  totals: TotalSpan=1.6368 TotalProjectedSpan=1.6368 TotalChord=1.10977 TotalArea=1.8283 TotalAR=1.46535 MAC=1.17013
  root: chord 1.3, twist 0, NACA 4-series Camber=0 CamberLoc=0.2 ThickChord=0.1
  sections:
    n  Span      Root_Chord  Tip_Chord  Area      Sweep    Sweep_Location  Dihedral  Twist  Twist_Location  tip airfoil
    1  0.424747  1.3         1.3        0.552172  0        0               0         0      0.25            as above
    2  0.393651  1.3         0.539087   0.361979  61.0714  0               0         0      0.25            as above

Wing "Back Fin", child of "Back Fin"
  location (X Y Z) 25 1.3 -1.26667, rotation 135 0 0
  symmetric about XZ
  bounding box size 1.3 2.69198 0.670672
  totals: TotalSpan=1.6368 TotalProjectedSpan=1.6368 TotalChord=1.10977 TotalArea=1.8283 TotalAR=1.46535 MAC=1.17013
  root: chord 1.3, twist 0, NACA 4-series Camber=0 CamberLoc=0.2 ThickChord=0.1
  sections:
    n  Span      Root_Chord  Tip_Chord  Area      Sweep    Sweep_Location  Dihedral  Twist  Twist_Location  tip airfoil
    1  0.424747  1.3         1.3        0.552172  0        0               0         0      0.25            as above
    2  0.393651  1.3         0.539087   0.361979  61.0714  0               0         0      0.25            as above

Stack "A2A Aim-120C Qty 2", child of "Fuselage"
  location (X Y Z) 14.4995 0.666667 -2.08333, rotation 45 0 0
  symmetric about XZ
  bounding box size 12 2.18186 0.848528
  cross sections:
    n  XDelta  YDelta  ZDelta  shape
    0  0       0       0       point
    1  1       0       0       circle Circle_Diameter=0.583333
    2  11      0       0       circle Circle_Diameter=0.6

Wing "Forward Fin", child of "A2A Aim-120C Qty 2"
  location (X Y Z) 19.6667 0.666667 -2.08333, rotation -135 0 0
  symmetric about XZ
  bounding box size 1.38051 1.43101 0.699837
  totals: TotalSpan=1.70317 TotalProjectedSpan=1.70317 TotalChord=0.690256 TotalArea=1.17563 TotalAR=2.46745 MAC=0.920341
  root: chord 1.38051, twist 0, NACA 4-series Camber=0 CamberLoc=0.2 ThickChord=0.1
  sections:
    n  Span      Root_Chord  Tip_Chord  Area      Sweep  Sweep_Location  Dihedral  Twist  Twist_Location  tip airfoil
    1  0.851587  1.38051     0          0.587813  57     0               0         0      0.25            as above

Wing "Forward Fin", child of "Forward Fin"
  location (X Y Z) 19.6667 0.666667 -2.08333, rotation -45 0 0
  symmetric about XZ
  bounding box size 1.38051 2.63533 0.699837
  totals: TotalSpan=1.70317 TotalProjectedSpan=1.70317 TotalChord=0.690256 TotalArea=1.17563 TotalAR=2.46745 MAC=0.920341
  root: chord 1.38051, twist 0, NACA 4-series Camber=0 CamberLoc=0.2 ThickChord=0.1
  sections:
    n  Span      Root_Chord  Tip_Chord  Area      Sweep  Sweep_Location  Dihedral  Twist  Twist_Location  tip airfoil
    1  0.851587  1.38051     0          0.587813  57     0               0         0      0.25            as above

Wing "Forward Fin", child of "Forward Fin"
  location (X Y Z) 19.6667 0.666667 -2.08333, rotation 45 0 0
  symmetric about XZ
  bounding box size 1.38051 2.63533 0.699837
  totals: TotalSpan=1.70317 TotalProjectedSpan=1.70317 TotalChord=0.690256 TotalArea=1.17563 TotalAR=2.46745 MAC=0.920341
  root: chord 1.38051, twist 0, NACA 4-series Camber=0 CamberLoc=0.2 ThickChord=0.1
  sections:
    n  Span      Root_Chord  Tip_Chord  Area      Sweep  Sweep_Location  Dihedral  Twist  Twist_Location  tip airfoil
    1  0.851587  1.38051     0          0.587813  57     0               0         0      0.25            as above

Wing "Forward Fin", child of "Forward Fin"
  location (X Y Z) 19.6667 0.666667 -2.08333, rotation 135 0 0
  symmetric about XZ
  bounding box size 1.38051 1.43101 0.699837
  totals: TotalSpan=1.70317 TotalProjectedSpan=1.70317 TotalChord=0.690256 TotalArea=1.17563 TotalAR=2.46745 MAC=0.920341
  root: chord 1.38051, twist 0, NACA 4-series Camber=0 CamberLoc=0.2 ThickChord=0.1
  sections:
    n  Span      Root_Chord  Tip_Chord  Area      Sweep  Sweep_Location  Dihedral  Twist  Twist_Location  tip airfoil
    1  0.851587  1.38051     0          0.587813  57     0               0         0      0.25            as above

Wing "Back Fin", child of "A2A Aim-120C Qty 2"
  location (X Y Z) 25.1667 0.666667 -2.08333, rotation 45 0 0
  symmetric about XZ
  bounding box size 1.3 2.5827 0.670672
  totals: TotalSpan=1.6368 TotalProjectedSpan=1.6368 TotalChord=1.10977 TotalArea=1.8283 TotalAR=1.46535 MAC=1.17013
  root: chord 1.3, twist 0, NACA 4-series Camber=0 CamberLoc=0.2 ThickChord=0.1
  sections:
    n  Span      Root_Chord  Tip_Chord  Area      Sweep    Sweep_Location  Dihedral  Twist  Twist_Location  tip airfoil
    1  0.424747  1.3         1.3        0.552172  0        0               0         0      0.25            as above
    2  0.393651  1.3         0.539087   0.361979  61.0714  0               0         0      0.25            as above

Wing "Back Fin", child of "Back Fin"
  location (X Y Z) 25.1667 0.666667 -2.08333, rotation -135 0 0
  symmetric about XZ
  bounding box size 1.3 1.42531 0.670672
  totals: TotalSpan=1.6368 TotalProjectedSpan=1.6368 TotalChord=1.10977 TotalArea=1.8283 TotalAR=1.46535 MAC=1.17013
  root: chord 1.3, twist 0, NACA 4-series Camber=0 CamberLoc=0.2 ThickChord=0.1
  sections:
    n  Span      Root_Chord  Tip_Chord  Area      Sweep    Sweep_Location  Dihedral  Twist  Twist_Location  tip airfoil
    1  0.424747  1.3         1.3        0.552172  0        0               0         0      0.25            as above
    2  0.393651  1.3         0.539087   0.361979  61.0714  0               0         0      0.25            as above

Wing "Back Fin", child of "Back Fin"
  location (X Y Z) 25.1667 0.666667 -2.08333, rotation -45 0 0
  symmetric about XZ
  bounding box size 1.3 2.5827 0.670672
  totals: TotalSpan=1.6368 TotalProjectedSpan=1.6368 TotalChord=1.10977 TotalArea=1.8283 TotalAR=1.46535 MAC=1.17013
  root: chord 1.3, twist 0, NACA 4-series Camber=0 CamberLoc=0.2 ThickChord=0.1
  sections:
    n  Span      Root_Chord  Tip_Chord  Area      Sweep    Sweep_Location  Dihedral  Twist  Twist_Location  tip airfoil
    1  0.424747  1.3         1.3        0.552172  0        0               0         0      0.25            as above
    2  0.393651  1.3         0.539087   0.361979  61.0714  0               0         0      0.25            as above

Wing "Back Fin", child of "Back Fin"
  location (X Y Z) 25.1667 0.666667 -2.08333, rotation 135 0 0
  symmetric about XZ
  bounding box size 1.3 1.42531 0.670672
  totals: TotalSpan=1.6368 TotalProjectedSpan=1.6368 TotalChord=1.10977 TotalArea=1.8283 TotalAR=1.46535 MAC=1.17013
  root: chord 1.3, twist 0, NACA 4-series Camber=0 CamberLoc=0.2 ThickChord=0.1
  sections:
    n  Span      Root_Chord  Tip_Chord  Area      Sweep    Sweep_Location  Dihedral  Twist  Twist_Location  tip airfoil
    1  0.424747  1.3         1.3        0.552172  0        0               0         0      0.25            as above
    2  0.393651  1.3         0.539087   0.361979  61.0714  0               0         0      0.25            as above

Stack "A2A AIM-9X Qty 2", child of "Fuselage"
  location (X Y Z) 16.8333 1.53333 -2.19167, rotation 45 0 0
  symmetric about XZ
  bounding box size 9.95 3.72358 0.656917
  cross sections:
    n  XDelta  YDelta  ZDelta  shape
    0  0       0       0       circle Circle_Diameter=0.0477099
    1  0.85    0       0       circle Circle_Diameter=0.416667
    2  9.1     0       0       as above

Wing "Front Fin", child of "A2A AIM-9X Qty 2"
  location (X Y Z) 17.6333 1.53333 -2.19167, rotation -45 0 0
  symmetric about XZ
  bounding box size 0.724983 3.97808 0.481255
  totals: TotalSpan=1.21667 TotalProjectedSpan=1.21667 TotalChord=0.361111 TotalArea=0.439352 TotalAR=3.36923 MAC=0.481481
  root: chord 0.722222, twist 0, NACA 4-series Camber=0 CamberLoc=0.2 ThickChord=0.1
  sections:
    n  Span      Root_Chord  Tip_Chord  Area      Sweep  Sweep_Location  Dihedral  Twist  Twist_Location  tip airfoil
    1  0.608333  0.722222    0          0.219676  50     0               0         0      0.25            as above

Wing "Front Fin", child of "Front Fin"
  location (X Y Z) 17.6333 1.53333 -2.19167, rotation 45 0 0
  symmetric about XZ
  bounding box size 0.724983 3.97808 0.481255
  totals: TotalSpan=1.21667 TotalProjectedSpan=1.21667 TotalChord=0.361111 TotalArea=0.439352 TotalAR=3.36923 MAC=0.481481
  root: chord 0.722222, twist 0, NACA 4-series Camber=0 CamberLoc=0.2 ThickChord=0.1
  sections:
    n  Span      Root_Chord  Tip_Chord  Area      Sweep  Sweep_Location  Dihedral  Twist  Twist_Location  tip airfoil
    1  0.608333  0.722222    0          0.219676  50     0               0         0      0.25            as above

Wing "Front Fin", child of "Front Fin"
  location (X Y Z) 17.6333 1.53333 -2.19167, rotation -135 0 0
  symmetric about XZ
  bounding box size 0.724983 3.11777 0.481255
  totals: TotalSpan=1.21667 TotalProjectedSpan=1.21667 TotalChord=0.361111 TotalArea=0.439352 TotalAR=3.36923 MAC=0.481481
  root: chord 0.722222, twist 0, NACA 4-series Camber=0 CamberLoc=0.2 ThickChord=0.1
  sections:
    n  Span      Root_Chord  Tip_Chord  Area      Sweep  Sweep_Location  Dihedral  Twist  Twist_Location  tip airfoil
    1  0.608333  0.722222    0          0.219676  50     0               0         0      0.25            as above

Wing "Front Fin", child of "Front Fin"
  location (X Y Z) 17.6333 1.53333 -2.19167, rotation 135 0 0
  symmetric about XZ
  bounding box size 0.724983 3.11777 0.481255
  totals: TotalSpan=1.21667 TotalProjectedSpan=1.21667 TotalChord=0.361111 TotalArea=0.439352 TotalAR=3.36923 MAC=0.481481
  root: chord 0.722222, twist 0, NACA 4-series Camber=0 CamberLoc=0.2 ThickChord=0.1
  sections:
    n  Span      Root_Chord  Tip_Chord  Area      Sweep  Sweep_Location  Dihedral  Twist  Twist_Location  tip airfoil
    1  0.608333  0.722222    0          0.219676  50     0               0         0      0.25            as above

Wing "Rear Fin", child of "A2A AIM-9X Qty 2"
  location (X Y Z) 25.6858 1.53333 -2.19167, rotation 135 0 0
  symmetric about XZ
  bounding box size 0.917009 3.12956 0.485191
  totals: TotalSpan=1.19445 TotalProjectedSpan=1.19445 TotalChord=0.652384 TotalArea=0.779238 TotalAR=1.83089 MAC=0.680964
  root: chord 0.888889, twist 0, NACA 4-series Camber=0 CamberLoc=0.2 ThickChord=0.1
  sections:
    n  Span      Root_Chord  Tip_Chord  Area      Sweep  Sweep_Location  Dihedral  Twist  Twist_Location  tip airfoil
    1  0.597223  0.888889    0.415879   0.389619  40     0               0         0      0.25            as above

Wing "Rear Fin", child of "Rear Fin"
  location (X Y Z) 25.6858 1.53333 -2.19167, rotation -135 0 0
  symmetric about XZ
  bounding box size 0.917009 3.12956 0.485191
  totals: TotalSpan=1.19445 TotalProjectedSpan=1.19445 TotalChord=0.652384 TotalArea=0.779238 TotalAR=1.83089 MAC=0.680964
  root: chord 0.888889, twist 0, NACA 4-series Camber=0 CamberLoc=0.2 ThickChord=0.1
  sections:
    n  Span      Root_Chord  Tip_Chord  Area      Sweep  Sweep_Location  Dihedral  Twist  Twist_Location  tip airfoil
    1  0.597223  0.888889    0.415879   0.389619  40     0               0         0      0.25            as above

Wing "Rear Fin", child of "Rear Fin"
  location (X Y Z) 25.6858 1.53333 -2.19167, rotation -45 0 0
  symmetric about XZ
  bounding box size 0.917009 3.97416 0.485191
  totals: TotalSpan=1.19445 TotalProjectedSpan=1.19445 TotalChord=0.652384 TotalArea=0.779238 TotalAR=1.83089 MAC=0.680964
  root: chord 0.888889, twist 0, NACA 4-series Camber=0 CamberLoc=0.2 ThickChord=0.1
  sections:
    n  Span      Root_Chord  Tip_Chord  Area      Sweep  Sweep_Location  Dihedral  Twist  Twist_Location  tip airfoil
    1  0.597223  0.888889    0.415879   0.389619  40     0               0         0      0.25            as above

Wing "Rear Fin", child of "Rear Fin"
  location (X Y Z) 25.6858 1.53333 -2.19167, rotation 45 0 0
  symmetric about XZ
  bounding box size 0.917009 3.97416 0.485191
  totals: TotalSpan=1.19445 TotalProjectedSpan=1.19445 TotalChord=0.652384 TotalArea=0.779238 TotalAR=1.83089 MAC=0.680964
  root: chord 0.888889, twist 0, NACA 4-series Camber=0 CamberLoc=0.2 ThickChord=0.1
  sections:
    n  Span      Root_Chord  Tip_Chord  Area      Sweep  Sweep_Location  Dihedral  Twist  Twist_Location  tip airfoil
    1  0.597223  0.888889    0.415879   0.389619  40     0               0         0      0.25            as above

Custom "On Board Oxygen Generation System", child of "Fuselage"
  location (X Y Z) 11.6304 0.869565 0.108696, rotation 0 0 0
  bounding box size 1.64042 1.31233 2.29659
  Design: Height=2.29659 Length=1.64042 SquareFlag=0 Width=1.31233
  custom script Box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

Conformal "Fuselage Fuel Tank", child of "Fuselage"
  location (X Y Z) 0 0 0, rotation 0 0 0
  bounding box size 7.36099 7.38832 3.29161
  Design: ChordTrimFlag=0 ChordTrimMax=0.9 ChordTrimMin=0.1 EtaTrimMax=0.9 EtaTrimMin=0.1 L01Max=1 L01Min=1 L0LenTrimMax=28.6258 L0LenTrimMin=19.8213 LTrimMax=0.607156 LTrimMin=0.420411 OffSetEnds=1 Offset=0.05 Side1Trim=0.1 Side1TrimFlag=0 Side2Trim=0.380488 Side2TrimFlag=1 Side3Trim=0.44878 Side3TrimFlag=1 Side4Trim=0.00487805 Side4TrimFlag=1 UMaxTrimTypeFalg=0 UMinTrimTypeFalg=0 UTrimFlag=1 UTrimMax=0.595616 UTrimMin=0.444 V1TrimBegin=1 V1TrimEnd=0.126829 V1TrimFlag=1 V2TrimBegin=0.736585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

Stack "GAU-22A", child of "Fuselage"
  location (X Y Z) 18.0041 -2 1.14754, rotation 0 0 0
  bounding box size 6.93333 0.85 0.85
  cross sections:
    n  XDelta   YDelta  ZDelta  shape
    0  0        0       0       circle Circle_Diameter=0.85
    1  6.93333  0       0       as above

Custom "Ammunition Box", child of "GAU-22A"
  location (X Y Z) 22.2391 -2 1.9, rotation 0 0 0
  bounding box size 2.8 0.5 0.5
  Design: Height=0.5 Length=2.8 SquareFlag=0 Width=0.5
  custom script Box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

Conformal "Secondary Fuel Tank", child of "Fuselage"
  location (X Y Z) 0 0 0, rotation 0 0 0
  bounding box size 1.60117 6.77805 1.92384
  Design: ChordTrimFlag=0 ChordTrimMax=0.9 ChordTrimMin=0.1 EtaTrimMax=0.9 EtaTrimMin=0.1 L01Max=1 L01Min=1 L0LenTrimMax=30.9628 L0LenTrimMin=28.5899 LTrimMax=0.656726 LTrimMin=0.606396 OffSetEnds=1 Offset=0.05 Side1Trim=0.1 Side1TrimFlag=0 Side2Trim=0.1 Side2TrimFlag=0 Side3Trim=0.570732 Side3TrimFlag=1 Side4Trim=0.1 Side4TrimFlag=0 UMaxTrimTypeFalg=0 UMinTrimTypeFalg=0 UTrimFlag=1 UTrimMax=0.635639 UTrimMin=0.595 V1TrimBegin=0.9 V1TrimEnd=0.1 V1TrimFlag=1 V2TrimBegin=0.4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

Conformal "Third Fuel Tank", child of "Fuselage"
  location (X Y Z) 0 0 0, rotation 0 0 0
  bounding box size 0.77552 6.87622 0.7174
  Design: ChordTrimFlag=0 ChordTrimMax=0.9 ChordTrimMin=0.1 EtaTrimMax=0.9 EtaTrimMin=0.1 L01Max=1 L01Min=1 L0LenTrimMax=32.0771 L0LenTrimMin=30.9225 LTrimMax=0.680914 LTrimMin=0.656405 OffSetEnds=1 Offset=0.1 Side1Trim=0.1 Side1TrimFlag=0 Side2Trim=0.1 Side2TrimFlag=0 Side3Trim=0.678049 Side3TrimFlag=1 Side4Trim=0.1 Side4TrimFlag=0 UMaxTrimTypeFalg=0 UMinTrimTypeFalg=0 UTrimFlag=1 UTrimMax=0.655378 UTrimMin=0.6356 V1TrimBegin=0.9 V1TrimEnd=0.1 V1TrimFlag=0 V2TrimBegin=0.4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

Conformal "Fourth Fuel Tank", child of "Fuselage"
  location (X Y Z) 0 0 0, rotation 0 0 0
  bounding box size 6.9985 1.81561 2.27986
  Design: ChordTrimFlag=0 ChordTrimMax=0.9 ChordTrimMin=0.1 EtaTrimMax=0.9 EtaTrimMin=0.1 L01Max=1 L01Min=1 L0LenTrimMax=28.6041 L0LenTrimMin=19.6808 LTrimMax=0.607192 LTrimMin=0.417773 OffSetEnds=1 Offset=0.1 Side1Trim=0.634146 Side1TrimFlag=1 Side2Trim=0.204878 Side2TrimFlag=1 Side3Trim=0.419512 Side3TrimFlag=1 Side4Trim=0.336585 Side4TrimFlag=1 UMaxTrimTypeFalg=0 UMinTrimTypeFalg=0 UTrimFlag=1 UTrimMax=0.595892 UTrimMin=0.44223 V1TrimBegin=0.9 V1TrimEnd=0.1 V1TrimFlag=0 V2TrimBegin=0.4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

Conformal "Fifth Fuel Tank", child of "Fuselage"
  location (X Y Z) 0 0 0, rotation 0 0 0
  bounding box size 0.600533 6.19731 0.381687
  Design: ChordTrimFlag=0 ChordTrimMax=0.9 ChordTrimMin=0.1 EtaTrimMax=0.9 EtaTrimMin=0.1 L01Max=1 L01Min=1 L0LenTrimMax=32.9288 L0LenTrimMin=32.0784 LTrimMax=0.698993 LTrimMin=0.680941 OffSetEnds=1 Offset=0.1 Side1Trim=0.1 Side1TrimFlag=0 Side2Trim=0.609756 Side2TrimFlag=0 Side3Trim=0.72 Side3TrimFlag=1 Side4Trim=0.1 Side4TrimFlag=0 UMaxTrimTypeFalg=0 UMinTrimTypeFalg=0 UTrimFlag=1 UTrimMax=0.67 UTrimMin=0.6554 V1TrimBegin=0.9 V1TrimEnd=0.1 V1TrimFlag=0 V2TrimBegin=0.4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

Conformal "Sixth Fuel Tank", child of "Fuselage"
  location (X Y Z) 0 0 0, rotation 0 0 0
  bounding box size 0.849987 4.57806 0.301671
  Design: ChordTrimFlag=0 ChordTrimMax=0.9 ChordTrimMin=0.1 EtaTrimMax=0.9 EtaTrimMin=0.1 L01Max=1 L01Min=1 L0LenTrimMax=34.0895 L0LenTrimMin=32.9288 LTrimMax=0.723633 LTrimMin=0.698993 OffSetEnds=1 Offset=0.1 Side1Trim=0.1 Side1TrimFlag=0 Side2Trim=0.1 Side2TrimFlag=0 Side3Trim=0.809756 Side3TrimFlag=1 Side4Trim=0.1 Side4TrimFlag=0 UMaxTrimTypeFalg=0 UMinTrimTypeFalg=0 UTrimFlag=1 UTrimMax=0.69 UTrimMin=0.67 V1TrimBegin=0.9 V1TrimEnd=0.1 V1TrimFlag=0 V2TrimBegin=0.4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

Wing "Main Wing"
  location (X Y Z) 9.5 2.3 0, rotation 0 0 0
  symmetric about XZ
  bounding box size 32.0012 46.6 3.20849
  totals: TotalSpan=42 TotalProjectedSpan=42 TotalChord=19.75 TotalArea=625.595 TotalAR=2.81971 MAC=17.6977
  root: chord 32, twist 0, NACA 64-series A=0.7 IdealCl=0.2 ThickChord=0.1
  sections:
    n  Span     Root_Chord  Tip_Chord  Area     Sweep  Sweep_Location  Dihedral  Twist  Twist_Location  tip airfoil
    1  2.94797  32          21         78.1213  70     0               0         -0.75  0.25            NACA 64-series A=0.7 IdealCl=0.2 ThickChord=0.06
    2  18.052   21          5          234.676  40     0               0         0      0.25            NACA 64-series A=0.7 IdealCl=0.2 ThickChord=0.04
  SS_Control "TE Flaps": UStart=0.505 UEnd=0.665 Length_C_Start=0.193424 Length_C_End=0.383149 Length_Start=4 Length_End=4 LE_Flag=0 Surf_Type=2
  SS_Control "Ailerons": UStart=0.675 UEnd=0.745 Length_C_Start=0.25 Length_C_End=0.46052 Length_Start=2.44995 Length_End=2.44995 LE_Flag=0 Surf_Type=2
  SS_Control "LE Slats": UStart=0.505 UEnd=0.665 Length_C_Start=0.12089 Length_C_End=0.239468 Length_Start=2.5 Length_End=2.5 LE_Flag=1 Surf_Type=2

Conformal "Wing Fuel Tank", child of "Main Wing"
  location (X Y Z) 9.5 2.3 0, rotation 0 0 0; relative location 0 0 0, rotation 0 0 0
  symmetric about XZ
  bounding box size 11.9545 33.031 0.925548
  Design: ChordTrimFlag=0 ChordTrimMax=0.9 ChordTrimMin=0.1 EtaTrimMax=0.679704 EtaTrimMin=0.296438 L01Max=1 L01Min=1 L0LenTrimMax=23.4074 L0LenTrimMin=11.0353 LTrimMax=0.9999 LTrimMin=0.471397 OffSetEnds=1 Offset=0.1 Side1Trim=0.1 Side1TrimFlag=0 Side2Trim=0.1 Side2TrimFlag=0 Side3Trim=0.1 Side3TrimFlag=0 Side4Trim=0.1 Side4TrimFlag=0 UMaxTrimTypeFalg=0 UMinTrimTypeFalg=0 UTrimFlag=1 UTrimMax=0.813699 UTrimMin=0.590771 V1TrimBegin=0.87 V1TrimEnd=0.13 V1TrimFlag=1 V2TrimBegin=0.42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

Conformal "Secondary Wing Fuel Tank", child of "Main Wing"
  location (X Y Z) 9.5 2.3 0, rotation 0 0 0; relative location 0 0 0, rotation 0 0 0
  symmetric about XZ
  bounding box size 19.128 16.8875 2.03333
  Design: ChordTrimFlag=0 ChordTrimMax=0.9 ChordTrimMin=0.1 EtaTrimMax=0.293348 EtaTrimMin=0.0695691 L01Max=1 L01Min=1 L0LenTrimMax=10.8956 L0LenTrimMin=0 LTrimMax=0.465431 LTrimMin=0 OffSetEnds=1 Offset=0.1 Side1Trim=0.1 Side1TrimFlag=0 Side2Trim=0.1 Side2TrimFlag=0 Side3Trim=0.1 Side3TrimFlag=0 Side4Trim=0.1 Side4TrimFlag=0 UMaxTrimTypeFalg=0 UMinTrimTypeFalg=0 UTrimFlag=1 UTrimMax=0.588974 UTrimMin=0.247789 V1TrimBegin=0.87 V1TrimEnd=0.13 V1TrimFlag=1 V2TrimBegin=0.48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
